// COMSOL Multiphysics 6.3.0.420 model "G1_contact_diameter_50um.mph"
// Outline of the model tree

Geometry
  geom1 "Geometry 1" (3D, length unit µm)
    wp1: WorkPlane | unite = on
      imp1: Import
        type = dxf
        filename = C:\Users\karth\Desktop\Otto\a4x8_3mm_var_100_var.dxf
        lengthunittype = dxf
        virtualgeometrytype = dxf
        objectstoimporttype = dxf
        layerstype = dxf
        componentsstype = dxf
        compattrtag = imp1.component
        cellstype = dxf
        arcrecognitiontype = dxf
        simplifytype = dxf
      del1: Delete "Delete Entities 1" | input = imp1(1)
    wp4: WorkPlane | unite = on
      imp1: Import
        type = dxf
        filename = C:\Users\karth\OneDrive\Desktop\Vinayak Materials\COMSOL Model Files\Invivo&vitro model comparison_G1array\G1.dxf
        lengthunittype = dxf
        virtualgeometrytype = dxf
        objectstoimporttype = dxf
        layerstype = dxf
        layerselection = selected
        layers = L2
        componentsstype = dxf
        compattrtag = imp1.component
        cellstype = dxf
        arcrecognitiontype = dxf
        simplifytype = dxf
    ext1: Extrude | workplane = wp1; input = wp1
    ext4: Extrude | workplane = wp4; input = wp4; distance = 15
    mov1: Move | input = ext1, ext4; displx = 50; disply = 0; displz = -50
    blk8: Block "L6" | size = {540, 4000, 4000}; base = center; pos = {4080-400, 0, 0}
    blk9: Block "L5" | size = {240, 4000, 4000}; base = center; pos = {3690-400, 0, 0}
    blk10: Block "L4" | size = {380, 4000, 4000}; base = center; pos = {3380-400, 0, 0}
    blk11: Block "L23" | size = {700, 4000, 4000}; base = center; pos = {2840-400, 0, 0}
    blk12: Block "L1" | size = {140, 4000, 4000}; base = center; pos = {2420-400, 0, 0}
    blk13: Block "CSF" | size = {1600, 4000, 4000}; base = center; pos = {1150, 0, 0}
    blk14: Block "Dura" | size = {2700, 4000, 4000}; base = center; pos = {-1000, 0, 0}
    pt2: Point | p = {3162.5, -150, -49.5}
    fin: Finalize "Form Union"

Materials
  mat1: Common "Silicon" on domains 2-20, 22, 24-27, 29-32, 34-37
    def: def "Basic"
      relpermeability = 1
      electricconductivity = 1e-12[S/m]
      thermalexpansioncoefficient = 2.6e-6[1/K]
      heatcapacity = 700[J/(kg*K)]
      relpermittivity = 11.7
      density = 2329[kg/m^3]
      thermalconductivity = 130[W/(m*K)]
    Enu: Enu "Young's modulus and Poisson's ratio"
      E = 170e9[Pa]
      nu = 0.28
    RefractiveIndex: RefractiveIndex
      n = 3.48
      ki = 0
  mat2: Common "Iridium" on domains 38-49, 52, 54, 56, 58-77
    def: def "Basic"
      electricconductivity = 9.43*10^6
      relpermittivity = 1
  mat10: Common "ETI" (disabled) on no domains
    def: def "Basic"
      electricconductivity = 0.1667
      relpermittivity = 1
  mat5: Common "L1 gray matter" on domains 23
    def: def "Basic"
      electricconductivity = diag{0.319, 0.231, 0.231}
      relpermittivity = 1
  mat11: Common "L23 gray matter" on domains 28
    def: def "Basic"
      electricconductivity = diag{0.319, 0.231, 0.231}
      relpermittivity = 1
  mat12: Common "L4 gray matter" on domains 33
    def: def "Basic"
      electricconductivity = diag{0.325, 0.240, 0.240}
      relpermittivity = 1
  mat13: Common "L5 gray matter" on domains 50, 51, 53, 55, 57, 79-82
    def: def "Basic"
      electricconductivity = diag{0.353, 0.228, 0.228}
      relpermittivity = 1
  mat14: Common "L6 gray matter" on domains 78
    def: def "Basic"
      electricconductivity = diag{0.294, 0.268, 0.268}
      relpermittivity = 1
  mat15: Common "CSF" on domains 21
    def: def "Basic"
      electricconductivity = 1.7
      relpermittivity = 1
  mat16: Common "Dura" on domains 1
    def: def "Basic"
      electricconductivity = 0.065
      relpermittivity = 1

Physics
  ec: ConductiveMedia "Electric Currents" on all domains
    dependent variable V
    cucn1: CurrentConservation (default)
    ein1: ElectricInsulation (default)
    init1: init "Initial Values 1" (default)
    pcs1: PointCurrentSource on points 1369 | Qjp = 1*10^-6
    gnd1: Ground on boundaries 1-5, 258-260, 266, 346-348, 369, 371-373, 394, 404-406, 427, 831-833, 869, 1745-1747, 1768, 1769
    ein2: ElectricInsulation on boundaries 770, 771, 774-777, 780, 781, 784, 785, 790-795, 802, 803, 810, 811, 822, 823, 839, 842, 872, 873, 884, 885, 896, 897, 908, 909, 912, 913, 920-923

Mesh
  mesh1 "Mesh 1"
    size: MeshSizeDefault | hmax = 915; hmin = 171; hcurve = 0.7; hnarrow = 0.4; hgrad = 1.6; hauto = 2; custom = on
    ftet2: FreeTet "Free Tetrahedral 2" on remaining entities
      size1: Size on domains 2, 22, 24-27, 29-32, 34-49, 52, 54, 56, 58-77 | hmin = 0.05; hauto = 1; custom = on
      size2: Size on domains 1, 3-21, 23, 28, 33, 50, 51, 53, 55, 57, 79-82 | hauto = 6

Studies
  std1 "Study 1"
    stat: Stationary

Solver configurations
  sol1 "Solution 1" (study std1)
    v1: Variables "Dependent Variables 1"
    s1: Stationary "Stationary Solver 1"
      fc1: FullyCoupled | linsolver = dDef
      dDef: Direct

Datasets
  dset1: Solution | solution = sol1
  cln1: CutLine3D
    data = dset1
    genpoints = {{3162.5, -150, -50}, {3162.5, -450, -50}}
    genparadist = 40
    orthvec = {0, -1, 0}

Exports
  data1: Data
    data = dset1
    expr = comp1.V
    filename = D:\vinayak\DUKE\Research\Grill_Lab_ICMS\12_OttoLab_DicriminationTask\Final_Model_Deposit\COMSOL_FEM\Depth_up150um\pot_G1_S1_5um.txt
    location = file
    coordfilename = D:\vinayak\DUKE\Research\Grill_Lab_ICMS\12_OttoLab_DicriminationTask\Final_Model_Deposit\COMSOL_FEM\Depth_up150um\neuron_coordinates.txt